Clear
! This script is based on a script developed by Tennessee Tech Univ students
! Tyler Patton, Jon Wood, and David Woods, April 2009
!

new circuit.IEEE13Nodeckt
~ basekv=11.4 pu=1.035 phases=3 bus1=SourceBus
~ MVAsc3=48.887 MVASC1=9.557    ! stiffen the source to approximate inf source
~ x1r1=2.082 x0r0=2.328

New Transformer.Sub Phases=3 Windings=2 XHL=3.33592 %NoLoadLoss=0.279333
~ wdg=1 bus=SourceBus   Conn=delta kV=11.4 kVA=150 Tap=1 %R=0.563667
~ wdg=2 bus=650         Conn=wye   kV=0.22 kVA=150 Tap=1 %R=0.563667


!LINE CODES
redirect IEEELineCodes.dss

// these are local matrix line codes
// corrected 9-14-2011
New linecode.mtx601 nphases=3 BaseFreq=60
~ rmatrix = (0.3465 | 0.1560 0.3375 | 0.1580 0.1535 0.3414 )
~ xmatrix = (1.0179 | 0.5017 1.0478 | 0.4236 0.3849 1.0348 )
~ units=mi
New linecode.mtx602 nphases=3 BaseFreq=60
~ rmatrix = (0.7526 | 0.1580 0.7475 | 0.1560 0.1535 0.7436 )
~ xmatrix = (1.1814 | 0.4236 1.1983 | 0.5017 0.3849 1.2112 )
~ units=mi
New linecode.mtx603 nphases=2 BaseFreq=60
~ rmatrix = (1.3238 | 0.2066 1.3294 )
~ xmatrix = (1.3569 | 0.4591 1.3471 )
~ units=mi
New linecode.mtx604 nphases=2 BaseFreq=60
~ rmatrix = (1.3238 | 0.2066 1.3294 )
~ xmatrix = (1.3569 | 0.4591 1.3471 )
~ units=mi
New linecode.mtx605 nphases=1 BaseFreq=60
~ rmatrix = (1.3292 )
~ xmatrix = (1.3475 )
~ units=mi


New Linecode.mtx606 nphases=3  Units=mi
~ Rmatrix=[0.791721  |0.318476  0.781649  |0.28345  0.318476  0.791721  ]
~ Xmatrix=[0.438352  |0.0276838  0.396697  |-0.0184204  0.0276838  0.438352  ]
~ Cmatrix=[383.948  |0  383.948  |0  0  383.948  ]
New linecode.mtx607 nphases=1 BaseFreq=60
~ rmatrix = (1.3425 )
~ xmatrix = (0.5124 )
~ cmatrix = [236]
~ units=mi

New LoadShape.ip-tipo1 Npts=288
 ~ Mult=(1.0, 1.0, 1.0, 1.0, 1.0, 1.0, 1.0, 1.0, 1.0, 1.0, 1.0, 1.0, 1.0, 1.0, 1.0, 1.0, 1.0, 1.0, 1.0, 1.0, 1.0, 1.0, 0.75, 0.41667185360388403)
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 ~ Hour=(0.0, 0.25, 0.5, 0.75, 1.0, 1.25, 1.5, 1.75, 2.0, 2.25, 2.5, 2.75, 3.0, 3.25, 3.5, 3.75, 4.0, 4.25, 4.5, 4.75, 5.0, 5.25, 5.5, 5.75)
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
!!! Iluminação pública
New Load._ip_28308363 Bus1=bus_566670641_37062204.1.3 Phases=1 kV=0.22 kW=0.084 Model=8 Daily=ip-tipo1 Conn=delta kvar=0.0160187 Status=exempt Class=2 Vminpu=0.92 ZIPV=(-0.16, 1.2, -0.04, 3.26, -4.11, 1.85, 0.52)
New Load._ip_28308464 Bus1=bus_566670641_37113232.1.2 Phases=1 kV=0.22 kW=0.084 Model=8 Daily=ip-tipo1 Conn=delta kvar=0.0160187 Status=exempt Class=2 Vminpu=0.92 ZIPV=(-0.16, 1.2, -0.04, 3.26, -4.11, 1.85, 0.52)
New Load._ip_28308588 Bus1=bus_566670641_37028545.2.3 Phases=1 kV=0.22 kW=0.084 Model=8 Daily=ip-tipo1 Conn=delta kvar=0.0160187 Status=exempt Class=2 Vminpu=0.92 ZIPV=(-0.16, 1.2, -0.04, 3.26, -4.11, 1.85, 0.52)
New Load._ip_28308999 Bus1=bus_566670641_37032475.1.2 Phases=1 kV=0.22 kW=0.084 Model=8 Daily=ip-tipo1 Conn=delta kvar=0.0160187 Status=exempt Class=2 Vminpu=0.92 ZIPV=(-0.16, 1.2, -0.04, 3.26, -4.11, 1.85, 0.52)
New Load._ip_28309092 Bus1=bus_566670641_37062502.2.3 Phases=1 kV=0.22 kW=0.084 Model=8 Daily=ip-tipo1 Conn=delta kvar=0.0160187 Status=exempt Class=2 Vminpu=0.92 ZIPV=(-0.16, 1.2, -0.04, 3.26, -4.11, 1.85, 0.52)
New Load._ip_28309161 Bus1=bus_566670641_472512386.1.2 Phases=1 kV=0.22 kW=0.084 Model=8 Daily=ip-tipo1 Conn=delta kvar=0.0160187 Status=exempt Class=2 Vminpu=0.92 ZIPV=(-0.16, 1.2, -0.04, 3.26, -4.11, 1.85, 0.52)
New Load._ip_28308982 Bus1=bus_566670641_37113446.1.3 Phases=1 kV=0.22 kW=0.084 Model=8 Daily=ip-tipo1 Conn=delta kvar=0.0160187 Status=exempt Class=2 Vminpu=0.92 ZIPV=(-0.16, 1.2, -0.04, 3.26, -4.11, 1.85, 0.52)
New Load._ip_28308775 Bus1=bus_566670641_37028632.1.3 Phases=1 kV=0.22 kW=0.084 Model=8 Daily=ip-tipo1 Conn=delta kvar=0.0160187 Status=exempt Class=2 Vminpu=0.92 ZIPV=(-0.16, 1.2, -0.04, 3.26, -4.11, 1.85, 0.52)
New Load._ip_28308625 Bus1=bus_566670641_37062314.1.2 Phases=1 kV=0.22 kW=0.084 Model=8 Daily=ip-tipo1 Conn=delta kvar=0.0160187 Status=exempt Class=2 Vminpu=0.92 ZIPV=(-0.16, 1.2, -0.04, 3.26, -4.11, 1.85, 0.52)
New Load._ip_28308456 Bus1=bus_566670641_37028496.1.3 Phases=1 kV=0.22 kW=0.084 Model=8 Daily=ip-tipo1 Conn=delta kvar=0.0160187 Status=exempt Class=2 Vminpu=0.92 ZIPV=(-0.16, 1.2, -0.04, 3.26, -4.11, 1.85, 0.52)
New Load._ip_28307968 Bus1=bus_566670641_37028294.1.3 Phases=1 kV=0.22 kW=0.084 Model=8 Daily=ip-tipo1 Conn=delta kvar=0.0160187 Status=exempt Class=2 Vminpu=0.92 ZIPV=(-0.16, 1.2, -0.04, 3.26, -4.11, 1.85, 0.52)
New Load._ip_28308055 Bus1=bus_566670641_37035979.1.2 Phases=1 kV=0.22 kW=0.084 Model=8 Daily=ip-tipo1 Conn=delta kvar=0.0160187 Status=exempt Class=2 Vminpu=0.92 ZIPV=(-0.16, 1.2, -0.04, 3.26, -4.11, 1.85, 0.52)
New Load._ip_28308160 Bus1=bus_566670641_37028374.2.3 Phases=1 kV=0.22 kW=0.084 Model=8 Daily=ip-tipo1 Conn=delta kvar=0.0160187 Status=exempt Class=2 Vminpu=0.92 ZIPV=(-0.16, 1.2, -0.04, 3.26, -4.11, 1.85, 0.52)


!Bus 670 is the concentrated point load of the distributed load on line 632 to 671 located at 1/3 the distance from node 632

!LINE DEFINITIONS
New Line.650632    Phases=3 Bus1=650.1.2.3   Bus2=632.1.2.3  LineCode=mtx601 Length=2000 units=ft
New Line.632670    Phases=3 Bus1=632.1.2.3    Bus2=670.1.2.3  LineCode=mtx601 Length=667  units=ft
New Line.670671    Phases=3 Bus1=670.1.2.3    Bus2=671.1.2.3  LineCode=mtx601 Length=1333 units=ft
New Line.671680    Phases=3 Bus1=671.1.2.3    Bus2=680.1.2.3  LineCode=mtx601 Length=1000 units=ft
New Line.632633    Phases=3 Bus1=632.1.2.3    Bus2=633.1.2.3  LineCode=mtx602 Length=500  units=ft
New Line.632645    Phases=2 Bus1=632.1.2.3     Bus2=645.1.2.3    LineCode=mtx603 Length=500  units=ft
New Line.645646    Phases=2 Bus1=645.1.2.3      Bus2=646.1.2.3    LineCode=mtx603 Length=300  units=ft
New Line.692675    Phases=3 Bus1=692.1.2.3    Bus2=675.1.2.3  LineCode=mtx606 Length=500  units=ft
New Line.671684    Phases=2 Bus1=671.1.2.3      Bus2=684.1.2.3    LineCode=mtx604 Length=300  units=ft
New Line.684611    Phases=1 Bus1=684.1.2.3        Bus2=611.1.2.3      LineCode=mtx605 Length=300  units=ft
New Line.684652    Phases=1 Bus1=684.1.2.3        Bus2=652.1.2.3      LineCode=mtx607 Length=800  units=ft

MakeBusList
Set Voltagebases=[115, 4.16, .48]
CalcVoltageBases

!!Solve
BusCoords IEEE13Node_BusXY.csv

Set maxiterations = 500
set mode=snap
